# OpenSim document version 44000
XsensDataReaderSettings:
  trial_prefix: Xsens
  # List of Experimental sensors and desired associated names in resulting tables
  ExperimentalSensors:
    ExperimentalSensor _44: name_in_model=r_humerus_imu
    ExperimentalSensor _55: name_in_model=r_ulna_radius_hand_imu
  # Add metadata
